// COMSOL Multiphysics 6.0.0.318 model "实际购买的参数-UF86 - 钢芯 - 副本 - 副本.mph"
// Outline of the model tree

Parameters
  w = 1[mm]  // 缺陷宽度
  v = 10[V]  // 励磁电压
  b = 3[mm]  // 埋藏深度
  td = 0.01[s]  // 上升沿时间
  miu = 400  // 磁芯相对磁导率μ
  sh = 4  // 励磁线圈高度
  sl = 40  // 励磁线圈长度
  sw = 1  // 励磁线圈线径
  test = (sh/sw)*(sl/sw)
  hh = 2  // 缺陷高度

Functions
  int1: Interpolation "插值 1" | table = {{0, 0}, {td, v}, {0.5, v}, {0.5+td, 0}, {1, 0}}
  wv1: Wave "较高频" | period = 1/1000; amplitude = 5
  wv2: Wave "较低频" | period = 1/100; amplitude = 5

Geometry
  geom1 "几何 1" (2D, length unit mm)
    r1: Rectangle "第1层铝" | pos = {-75, 7}; size = {150, 4}
    r2: Rectangle "第2层铝" | pos = {-75, 3}; size = {150, 4}
    r3: Rectangle "钢芯" | pos = {-75, 0}; size = {150, 3}
    r10: Rectangle "矩形 10" | pos = {-46, 11}; size = {16, 47}
    r11: Rectangle "矩形 11" | pos = {30, 11}; size = {16, 47}
    r12: Rectangle "矩形 12" | pos = {-30, 44}; size = {60, 14}
    pol1: Polygon "磁芯" (disabled)
      source = table
      table = {{-37, 12}, {-37, 45}, {37, 45}, {37, 12}, {23, 12}, {23, 31}, {-23, 31}, {-23, 12}}
    r4: Rectangle "激励线圈_上半" | pos = {0, 58+sh/2}; base = center; size = {sl, sh}
    r5: Rectangle "激励线圈_下半" | pos = {0, 44-sh/2}; base = center; size = {sl, sh}
    r7: Rectangle "缺陷" | pos = {2, 11-hh}; size = {w, hh}
    r6: Rectangle "空气域" | pos = {-100, -50}; size = {200, 150}
    r9: Rectangle "接收线圈_1" | pos = {1, 11}; size = {4, 2}
    r8: Rectangle "接收线圈_2" | pos = {-5, 11}; size = {4, 2}
    pt1: Point "点 1" | p = {, 12}
    dif2: Difference "差集 2" | input = r1, r2, r3; input2 = r7
    mov1: Move "移动 1" | input = r10, r11, r12, r4, r5; displx = 0; disply = 1
    r13: Rectangle "涡流线圈（右）" | pos = {30, 11}; size = {8, 1}
    r15: Rectangle "涡流线圈（右） 1" | pos = {38, 11}; size = {8, 1}
    r14: Rectangle "涡流线圈（左）" | pos = {-46, 11}; size = {8, 1}
    r16: Rectangle "涡流线圈（左） 1" | pos = {-38, 11}; size = {8, 1}
    fin: Finalize "形成联合体"
    cmd1: CompositeDomains "形成复合域 1" (disabled) | input = fin(1) domains 1, 7, 8, 14, 17

Materials
  mat1: Common "Air" on domains 1, 8, 14
    def "Basic"
      thermalexpansioncoefficient = alpha_p(pA,T)
      molarmass = 0.02897[kg/mol]
      bulkviscosity = muB(T)
      relpermeability = 1
      relpermittivity = 1
      dynamicviscosity = eta(T)
      ratioofspecificheat = 1.4
      electricconductivity = 1[S/m]
      heatcapacity = Cp(T)
      density = rho(pA,T)
      thermalconductivity = k(T)
      soundspeed = cs(T)
      eta: Piecewise | arg = T; pieces = {200.0, 1600.0, -8.38278E-7+8.35717342E-8*T^1-7.69429583E-11*T^2+4.6437266E-14*T^3-1.06585607E-17*T^4}; argunit = K; fununit = Pa*s
      Cp: Piecewise | arg = T; pieces = {200.0, 1600.0, 1047.63657-0.372589265*T^1+9.45304214E-4*T^2-6.02409443E-7*T^3+1.2858961E-10*T^4}; argunit = K; fununit = J/(kg*K)
      rho: Analytic | expr = pA*0.02897/R_const[K*mol/J]/T; args = {pA, T}; fununit = kg/m^3; argunit = {Pa, K}
      k: Piecewise | arg = T; pieces = {200.0, 1600.0, -0.00227583562+1.15480022E-4*T^1-7.90252856E-8*T^2+4.11702505E-11*T^3-7.43864331E-15*T^4}; argunit = K; fununit = W/(m*K)
      cs: Analytic | expr = sqrt(1.4*R_const[K*mol/J]/0.02897*T); args = T; fununit = m/s; argunit = K
      an1: Analytic | funcname = alpha_p; expr = -1/rho(pA,T)*d(rho(pA,T),T); args = {pA, T}; fununit = 1/K; argunit = {Pa, K}
      an2: Analytic "Analytic 2a" | funcname = muB; expr = 0.6*eta(T); args = T; fununit = Pa*s; argunit = K
    RefractiveIndex
      n = 1
      ki = 0
    NonlinearModel
      BA = (def.gamma+1)/2
    idealGas
      Rs = R_const/Mn
      heatcapacity = Cp(T)
      ratioofspecificheat = 1.4
      molarmass = 0.02897
      Cp: Piecewise | arg = T; pieces = {200.0, 1600.0, 1047.63657-0.372589265*T^1+9.45304214E-4*T^2-6.02409443E-7*T^3+1.2858961E-10*T^4}; argunit = K; fununit = J/(kg*K)
  mat2: Common "Aluminum" on domains 3, 4
    def "Basic"
      relpermeability = 1
      heatcapacity = 900[J/(kg*K)]
      thermalconductivity = 238[W/(m*K)]
      electricconductivity = 3.774e7[S/m]
      relpermittivity = 1
      thermalexpansioncoefficient = 23e-6[1/K]
      density = 2700[kg/m^3]
    Enu "Young's modulus and Poisson's ratio"
      E = 70e9[Pa]
      nu = 0.33
    Murnaghan
      l = -2.5e11[Pa]
      m = -3.3e11[Pa]
      n = -3.5e11[Pa]
    Lame "Lamé parameters"
      lambLame = 5.1e10[Pa]
      muLame = 2.6e10[Pa]
  mat3: Common "Iron" on domains 2
    def "Basic"
      relpermeability = 400
      electricconductivity = 5e6[S/m]
      thermalexpansioncoefficient = 12.2e-6[1/K]
      heatcapacity = 440[J/(kg*K)]
      relpermittivity = 1
      density = 7870[kg/m^3]
      thermalconductivity = 76.2[W/(m*K)]
    Enu "Young's modulus and Poisson's ratio"
      E = 200e9[Pa]
      nu = 0.29
  mat4: Common "Copper" (disabled) on domains 10-13
    def "Basic"
      relpermeability = 1
      electricconductivity = 5.998e7[S/m]
      thermalexpansioncoefficient = 17e-6[1/K]
      heatcapacity = 385[J/(kg*K)]
      relpermittivity = 1
      density = 8960[kg/m^3]
      thermalconductivity = 400[W/(m*K)]
    Enu "Young's modulus and Poisson's ratio"
      E = 110e9[Pa]
      nu = 0.35
    linzRes "Linearized resistivity"
      rho0 = 1.72e-8[ohm*m]
      alpha = 0.0039[1/K]
      Tref = 298[K]
  mat6: Common "铁氧体" on domains 6, 9, 16
    def "Basic"
      relpermeability = 2000
      electricconductivity = 0.2[S/m]
      thermalexpansioncoefficient = 12.2e-6[1/K]
      heatcapacity = 440[J/(kg*K)]
      relpermittivity = 1
      density = 7870[kg/m^3]
      thermalconductivity = 76.2[W/(m*K)]
    Enu "Young's modulus and Poisson's ratio"
      E = 200e9[Pa]
      nu = 0.29
  mat7: Common "线圈" on domains 5, 7, 10-13, 15, 17
    def "基本"
      electricconductivity = 5.998e7[S/m]
      relpermittivity = 1
      relpermeability = 1

Physics
  mf: InductionCurrents "磁场" on all domains
    dependent variable A = {Ax, Ay, Az}
    al1: AmperesLaw "安培定律 1" (default)
    mi1: MagneticInsulation "磁绝缘 1" (default)
    init1: init "初始值 1" (default)
    coil1: Coil "激励线圈" on domains 10, 11
      ConductorModel = Multi
      CoilExcitation = Voltage
      coilGroup = 1
      CoilName = exciting_coil
      ICoil = int1(t)[A]
      VCoil = int1(t)[V]
      N = (sh/sw)*(sl/sw)
      AreaFrom = Diameter
      coilWindDiameter = sw[mm]
      rcd1: ReverseCoilGroupDomain "反向电流方向 1" on domains 11
    coil2: Coil "接收线圈" on domains 12, 13
      ConductorModel = Multi
      coilGroup = 1
      CoilName = receiving_coil
      ICoil = 0[A]
      N = 800
      AreaFrom = Diameter
      coilWindDiameter = 0.1[mm]
      rcd1: ReverseCoilGroupDomain "反向电流方向 1" on domains 12
    coil3: Coil "涡流线圈（右）" on domains 15, 17
      ConductorModel = Multi
      coilGroup = 1
      CoilName = eddycurrentcoil_right
      ICoil = 0[A]
      N = 400
      AreaFrom = Diameter
      coilWindDiameter = 0.2[mm]
      rcd1: ReverseCoilGroupDomain "反向电流方向 1" on domains 15
    coil4: Coil "涡流线圈（左）" on domains 5, 7
      ConductorModel = Multi
      coilGroup = 1
      CoilName = eddycurrentcoil_left
      ICoil = 0[A]
      N = 400
      AreaFrom = Diameter
      coilWindDiameter = 0.2[mm]
      rcd1: ReverseCoilGroupDomain "反向电流方向 1" on domains 7

Mesh
  mesh1 "网格 1"
    size: MeshSizeDefault "大小" | hauto = 1; custom = on; hmax = 1
    size3: Size "大小 3" on entire geometry | hmin = 1; custom = on; hmax = 1
    map1: Map "映射 1" on domains 6, 9-11, 16
    size4: Size "大小 4" on entire geometry | hmin = 1; custom = on; hmax = 1
    fq1: FreeQuad "自由四边形网格 1" on domains 2-5, 7, 12-15, 17
    map2: Map "映射 2" (disabled) on domains 2-5, 7, 12, 13, 15, 17
    size5: Size "大小 5" on entire geometry | hauto = 3
    ftri1: FreeTri "自由三角形网格 1" on remaining entities

Studies
  std1 "研究 1"
    param: Parametric "参数化扫描" | pname = hh; plistarr = range(2,2,8)
    ccc: CoilCurrentCalculation "线圈几何分析"
    time: Transient "瞬态" | tlist = range(0,0.002,1)

Solver configurations
  sol1 "解 1" (study std1)
    v1: Variables "因变量 1"
    s1: Stationary "稳态求解器 1"
      dDef: Direct "直接"
      fcDef: FullyCoupled "全耦合"
    su1: StoreSolution "解存储 1"
    v2: Variables "因变量 2" | initmethod = sol; notsolmethod = sol
    t1: Time "瞬态求解器 1" | tlist = range(0,0.002,1); tout = tstepsclosest; tstepsbdf = strict; estrat = exclude
      dDef: Direct "直接"
      fc1: FullyCoupled "全耦合 1" | linsolver = dDef
  sol3 "参数化解 1" (study std1)
  sol2 "解存储 1" (study std1)

Datasets
  dset1: Solution | solution = sol1
  dset2: Solution | solution = sol2
  dset3: Solution | solution = sol3

Plots
  pg2: PlotGroup1D "中间线圈" | data = dset3
    glob1: Global "全局 1" | expr = mf.VCoil_receiving_coil; unit = mV; descr = 线圈电压
  pg3: PlotGroup1D "涡流线圈（右）" | data = dset3
    glob1: Global "全局 1" | expr = mf.VCoil_eddycurrentcoil_right-mf.VCoil_eddycurrentcoil_left; unit = mV
  pg4: PlotGroup1D "磁场" | data = dset3
    ptgr1: PointGraph "点结果图 1" on points 24 | expr = mf.Bx; unit = mT; descr = 磁通密度，x 分量
  pg5: PlotGroup1D "励磁电压/电流" | data = dset3
    glob1: Global "全局 1" | expr = mf.ICoil_exciting_coil; unit = A; descr = 线圈电流
  pg6: PlotGroup2D "电流密度模 (mf) 1" on domains 1-9, 12, 13 | data = dset1
    surf1: Surface "磁通密度模 (mf)" | expr = mf.Jz; unit = A/m^2; descr = 电流密度，z 分量
    str1: Streamline "流线 1" on boundaries 1-18, 20-38 | expr = {mf.Bx, mf.By}; udist = 0.03
      col1: Color "颜色表达式 1" | expr = mf.normB
      filt1: Filter "过滤器 1" | expr = !isScalingSystemDomain
    con1: Contour "等值线 1" | expr = mf.Az; levelrounding = off
      filt1: Filter "过滤器 1" | expr = !isScalingSystemDomain
  pg7: PlotGroup2D "磁通密度模 (mf) 1" | data = dset3
    surf1: Surface "表面 1" | expr = mf.normB
    str1: Streamline "流线 1" on boundaries 1-65 | expr = {mf.Bx, mf.By}; udist = 0.03
      col1: Color "颜色表达式 1" | expr = mf.normB
      filt1: Filter "过滤器 1" | expr = !isScalingSystemDomain
    con1: Contour "等值线 1" | expr = mf.Az; levelrounding = off
      filt1: Filter "过滤器 1" | expr = !isScalingSystemDomain

Exports
  plot1: Plot "绘图 1" | filename = C:\Users\87667\Desktop\Untitled.csv; multiplecurves = ascolumns